<?xml version="1.0"?>
<!--
MILTHRUST   [LBS]
MAXTHRUST   [LBS]
idlen1      [%]
maxn1       [%]
idlen2      [%]
maxn2       [%]
betarangeend[%]
    if ThrottleCmd < betarangeend/100.0 then engine power=idle, propeller pitch
    is controled by ThrottleCmd (between MINPITCH and  REVERSEPITCH).
    if ThrottleCmd > betarangeend/100.0 then engine power increases up to max reverse power
reversemaxpower [%]
    max engine power in reverse mode
maxpower    [HP]
psfc power specific fuel consumption [pph/HP] for N1=100%
n1idle_max_delay [-] time constant for N1 change
maxstartenginetime [sec]
    after this time the automatic starting cycle is interrupted when the engine
    doesn't start (0=automatic starting not present)
startern1   [%]
    when starting starter spin up engine to this spin
ielumaxtorque [lb.ft]
    if torque>ielumaxtorque limiters decrease the throttle
    (ielu = Integrated Electronic Limiter Unit)
itt_delay [-] time constant for ITT change
    (ITT = Inter Turbine Temperature)
-->

<turboprop_engine name="Dart_542-10K">
  <milthrust unit="LBS">       7183.7   </milthrust>
  <idlen1>                       50.0   </idlen1>
  <maxn1>                       100.0   </maxn1>
  <idlen2>                       58.0   </idlen2>
  <maxn2>                       100.0   </maxn2>
  <maxpower unit="HP">          3207   </maxpower>
  <psfc unit="LBS/HR/HP">        0.31 </psfc>
  <idlefuelflow>                 50.0   </idlefuelflow>
  <n1idle_max_delay>              1     </n1idle_max_delay>
  <maxstartingtime>              20     </maxstartingtime>
  <startern1>                    20     </startern1>
  <ielumaxtorque unit="FT*LB">  640     </ielumaxtorque>
  <itt_delay>                  0.05  </itt_delay>
<!--
  <betarangeend>                 64     </betarangeend>
  <reversemaxpower>              60     </reversemaxpower>
-->


  <table name="EnginePowerVC">
    <description> Engine power, function of airspeed and pressure </description>
    <independentVar lookup="row">atmosphere/P-sl-psf</independentVar>
    <independentVar lookup="column">velocities/ve-kts</independentVar>
    <tableData>
                 0     50    100    150    200    250
       503   0.357  0.380  0.400  0.425  0.457  0.486
      1048   0.586  0.589  0.600  0.621  0.650  0.686
      1328   0.707  0.721  0.731  0.757  0.786  0.821
      1496   0.779  0.786  0.808  0.821  0.857  0.900
      1684   0.850  0.857  0.874  0.900  0.943  0.979
      1896   0.914  0.929  0.946  0.971  1      1.057
      2135   1      1.011  1.029  1.043  1.083  1.150
      2213   1.029  1.043  1.057  1.079  1.114  1.171
    </tableData>
  </table>

  <table name="EnginePowerRPM_N1" type="internal">
    <description> Engine Power, function of RPM and N1 </description>
    <tableData>
	0	5	60	86	94	95	96	97	98	99	100	101
0	0	2.2	151.1	863.3	1510.7	1640.2	1812.8	1985.5	2158.1	2287.6	2503.5	2676.1
600	0	2.2	129.5	992.8	1726.5	1856	2028.7	2179.7	2374	2546.6	2762.4	2935.1
850	0	2.2	21.6	1035.9	1899.2	2050.2	2201.3	2374	2568.2	2719.3	2935.1	3107.7
1000	0	0.4	0.4	971.2	1942.3	2136.6	2266.1	2438.7	2632.9	2805.6	3021.4	3215.6
1162	0	0.4	0.4	884.8	1899.2	2071.8	2222.9	2417.1	2611.4	2784	2999.8	3207
1200	0	0.4	0.4	913.7	1961.3	2139.6	2295.6	2496.1	2696.8	2875	3097.9	3311.9
<!--
	0	5	60	86	94	95	96	97	98	99	100	101
0	0	0	0	0	0	0	0	0	0	0	0	0
400	0	0	0	0	0	0	0	0	0	0	0	0
600	0	0	0	0	0	0	0	0	0	0	0	0
850	0	0	0	0	0	0	0	0	0	0	0	0
1000	0	2.2	129.5	992.8	1726.5	1856	2028.7	2179.7	2374	2546.6	2762.4	2935.1
1162	0	0.4	0.4	884.8	1899.2	2071.8	2222.9	2417.1	2611.4	2784	2999.8	3207
1200	0	0.4	0.4	913.7	1961.3	2139.6	2295.6	2496.1	2696.8	2875	3097.9	3311.9

	0	5	60	86	94	95	96	97	98	99	100	101
0	0	1.82	145.71	619.28	1092.86	1202.15	1347.86	1511.78	1639.29	1712.13	1894.29	2040
800	0	1.82	127.5	728.57	1275	1384.29	1530	1675.71	1821.43	1930.71	2112.86	2258.57
1200	0	1.82	109.29	837.86	1457.14	1566.43	1712.14	1839.64	2003.57	2149.29	2331.43	2477.14
1600	0	1.82	18.21	874.29	1602.86	1730.36	1857.86	2003.57	2167.5	2295	2477.14	2622.86
2000	0	0.36	0.36	819.64	1639.29	1803.21	1912.5	2058.21	2222.14	2367.86	2550	2713.93
2200	0	0.36	0.36	746.79	1602.86	1748.57	1876.07	2040	2203.93	2349.64	2531.79	2706.64
-->
    </tableData>
  </table>

  <table name="ITT_N1" type="internal">
    <description> Inter-Turbine Temperature ITT [deg C] depending on N1 and engine run (0=off / 1=running) </description>
    <tableData>
              0     1
        0     0     0
       15   100   100
       60   180   520
       96   270   680
      100   280   730
    </tableData>
  </table>

</turboprop_engine>
