<?xml version="1.0"?>
<!-- Generated by Aero-Matic v 0.8

     Inputs:
                horsepower: 3207
                     pitch: variable
            max engine rpm: 1162
        prop diameter (ft): 14.4364

     Outputs:
              max prop rpm:1299.70
                gear ratio:   0.89
                       Cp0:0.116380
                       Ct0:0.100087
       static thrust (lbs):4850.75
-->

<propeller name="prop">
  <ixx> 46.7194 </ixx>
  <diameter unit="IN"> 173.2 </diameter>
  <numblades> 4 </numblades>
  <gearratio>1.0</gearratio>
  <minpitch> 12</minpitch>
  <maxpitch> 30 </maxpitch>
  <minrpm> 825 </minrpm>
  <maxrpm> 1162 </maxrpm>
  <windmillrpm> 825 </windmillrpm>
  <windmill-coef> 0.0005 </windmill-coef>

  <table name="C_THRUST" type="internal">
      <tableData>
             0    12       30
       0.0   0    0.1001   0.1701
       0.1   0    0.0918   0.1701
       0.2   0    0.0834   0.1701
       0.3   0    0.0793   0.1794
       0.4   0    0.0646   0.1787
       0.5   0    0.0569   0.1769
       0.6   0    0.0464   0.1726
       0.7   0    0.0313   0.1566
       0.8   0    0.0095   0.1434
       1.0   0   -0.0642   0.1388
       1.2   0   -0.1051   0.1205
       1.4   0   -0.1437   0.0852
       1.6   0   -0.1882   0.0320
       1.8   0   -0.2302   -0.0328
       2.0   0   -0.2702   -0.0669
       2.2   0   -0.3103   -0.9117
       2.4   0   -0.3503   -0.1267
      </tableData>
  </table>

  <table name="C_POWER" type="internal">
     <tableData>
               0     12        30
       0.0     0.05  0.1164    0.1964
       0.1     0.05  0.1164    0.1964
       0.2     0.04  0.1109    0.1964
       0.3     0.04  0.1054    0.1964
       0.4     0.03  0.0928    0.1964
       0.5     0.03  0.0763    0.1944
       0.6     0.02  0.0618    0.1925
       0.7     0.01  0.0364    0.1886
       0.8     0.00  0.0145    0.1847
       1.0    -0.05  -0.0436   0.1812
       1.2    -0.13  -0.1272   0.1782
       1.4    -0.24  -0.2363   0.1541
       1.6    -0.35  -0.3491   0.1239
       1.8    -0.47  -0.4655   0.0676
       2.0    -0.59  -0.5819   0.0303
       2.2    -0.70  -0.6983  -0.0352
       2.4    -0.82  -0.8147  -0.0753
<!--
                12         30
       0.0      0.1164   0.1764
       0.1      0.1164   0.1764
       0.2      0.1109   0.1764
       0.3      0.1054   0.1764
       0.4      0.0928   0.1764
       0.5      0.0763   0.1744
       0.6      0.0618   0.1725
       0.7      0.0364   0.1686
       0.8      0.0145   0.1607
       1.0      -0.0436   0.1312
       1.2      -0.1272   0.0882
       1.4      -0.2363   0.0441
       1.6      -0.3491   -0.0039
       1.8      -0.4655   -0.1076
       2.0      -0.5819   -0.2152
       2.2      -0.6983   -0.3228
       2.4      -0.8147   -0.4304
-->
     </tableData>
  </table>

</propeller>
